<Lems>

<!-- Specify which component to run -->
<Target component="sim1"/>

<!-- Include core NeuroML2 ComponentType definitions -->
<Include file="Cells.xml"/>
<Include file="Networks.xml"/>
<Include file="Simulation.xml"/>

<izhikevich2007Cell id="RS" v0 = "-60mV" C="100 pF" k = "0.7 nS_per_mV"
                        vr = "-60 mV" vt = "-40 mV" vpeak = "35 mV"
                        a = "0.03 per_ms" b = "-2 nS" c = "-50 mV" d = "100 pA"/>

<pulseGenerator id="RS_Iext" delay="0ms" duration="520ms" amplitude="100 pA"/>

<izhikevich2007Cell id="weaklyAdapting" v0 = "-65mV" C = "300 pF" k = "1 nS_per_mV"
                        vr = "-61.8 mV" vt = "-57.0 mV" vpeak = "22.6 mV"
                        a = "0.001 per_ms"  b = "3 nS" c = "-65.8 mV" d = "5 pA" />

<pulseGenerator id="weakIext"   delay="0ms" duration="1000ms" amplitude="100 pA"/>
<pulseGenerator id="weakIshift" delay="0ms" duration="1000ms" amplitude="-45 pA"/>

<izhikevich2007Cell id="stronglyAdapting" v0 = "-65mV" C="115 pF" k = "0.3 nS_per_mV"
                        vr = "-61.8 mV" vt = "-57.0 mV" vpeak = "22.6 mV"
                        a = "0.0012 per_ms" b = "3 nS" c = "-65.8 mV" d = "10 pA" />

<pulseGenerator id="strongIext"   delay="0ms" duration="1000ms" amplitude="100 pA"/>
<pulseGenerator id="strongIshift" delay="0ms" duration="1000ms" amplitude="0 pA"/>

<izhikevich2007Cell id="LS" v0 = "-66mV" C="20 pF" k = ".3 nS_per_mV"
                        vr = "-66 mV" vt = "-40 mV" vpeak = "30 mV"
                        a = "0.17 per_ms" b = "5 nS" c = "-45 mV" d = "100 pA"/>

<pulseGenerator id="LSIext" delay="100ms" duration="500ms" amplitude="130 pA"/>

<network id="net1">
    <population id="weakpop" component="weaklyAdapting" size="1"/>
    <population id="strongpop" component="stronglyAdapting" size="1"/>
    <population id="RS_pop" component="RS" size="1"/>

    <population id="LSpop" component="LS" type="populationList" size="1">
        <instance id="0">
            <location x="0" y="0" z="0"/>
        </instance>
    </population>

    <explicitInput target="weakpop[0]" input="weakIext" destination="synapses"/>
    <explicitInput target="weakpop[0]" input="weakIshift" destination="synapses"/>

    <explicitInput target="strongpop[0]" input="strongIext" destination="synapses"/>
    <explicitInput target="strongpop[0]" input="strongIshift" destination="synapses"/>

    <explicitInput target="RS_pop[0]" input="RS_Iext" destination="synapses"/>

        <inputList id="iLSIext" component="LSIext" population="LSpop">
            <input id="0" target="../LSpop/0/LS" destination="synapses"/>
        </inputList>

</network>

<!-- End of NeuroML2 content -->

<Simulation id="sim1" length="700ms" step="0.01ms" target="net1">

    <Display id="d1" title="Weakly adapting PYR model 1 with 100 pA input" timeScale="1ms" xmin="-100" xmax="1100" ymin="-80" ymax="40">
        <Line id ="weaklyAdapting v" quantity="weakpop[0]/v" scale="1mV"  color="#0000ff" timeScale="1ms"/>
    </Display>
    <Display id="d2" title="Strongly adapting PYR model with 100 pA input" timeScale="1ms" xmin="-100" xmax="1100" ymin="-80" ymax="40">
        <Line id ="stronglyAdapting v" quantity="strongpop[0]/v" scale="1mV"  color="#0000ff" timeScale="1ms"/>
    </Display>

    <Display id="d3" title="RS" timeScale="1ms" xmin="-100" xmax="1100" ymin="-80" ymax="50">
        <Line id ="RS v" quantity="RS_pop[0]/v" scale="1mV"  color="#0000ff" timeScale="1ms"/>
    </Display>

    <Display id="d4" title="LS (uses parameters from Fig 10 of suppl info of PNAS2008, but not same behaviour due to no dendrites)" timeScale="1ms" xmin="-100" xmax="1100" ymin="-80" ymax="50">
        <Line id ="LS v" quantity="LSpop/0/LS/v" scale="1mV"  color="#0000ff" timeScale="1ms"/>
    </Display>

    <OutputFile id="of0" fileName="results/iz2007_RS.dat">
        <OutputColumn id="rs" quantity="RS_pop[0]/v" />
    </OutputFile>

    <OutputFile id="of1" fileName="results/iz2007_ws.dat">
        <OutputColumn id="w" quantity="weakpop[0]/v" />
        <OutputColumn id="s" quantity="strongpop[0]/v" />
    </OutputFile>

    <OutputFile id="of2" fileName="results/iz2007_LS.dat">
        <OutputColumn id="ls" quantity="LSpop/0/LS/v" />
    </OutputFile>

</Simulation>

</Lems>
