<?xml version="1.0" encoding="UTF-8"?>
<neuroml xmlns="http://www.neuroml.org/schema/neuroml2"
         xmlns:xsi="http://www.w3.org/2001/XMLSchema-instance"
         xsi:schemaLocation="http://www.neuroml.org/schema/neuroml2 http://neuroml.svn.sourceforge.net/viewvc/neuroml/NeuroML2/Schemas/NeuroML2/NeuroML_v2alpha.xsd"
         id="PhasicBursting">

    <notes>NeuroML 2 file containing an abstract cell definition</notes>

    <izhikevichCell id="PhasicBursting" v0 = "-64mV" thresh = "30mV" a ="0.02" b = "0.25" c = "-55.0" d = "0.05" Iamp="0" Idel="0ms" Idur="2000ms"/>

</neuroml>
